*Heading
** Job name: Job-1 Model name: Job-1
** Generated by: Abaqus/CAE 2020
*Preprint, echo=NO, model=NO, history=NO, contact=NO
**
** PARTS
**
*Part, name=COMPLEX_200_8
*Node
      1,           4.,          -4.,           0.
      2,           4.,         -3.5,           0.
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*Element, type=B31
  1,   1,   2
  2,   2,   3
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*Nset, nset=_PICKEDSET5, internal, generate
   1,  201,    1
*Elset, elset=_PICKEDSET5, internal, generate
   1,  200,    1
*Elset, elset=SET-2, generate
   1,  200,    1
*Elset, elset=SET-3, generate
   1,  200,    1
** Section: Section-1-SET-2  Profile: Profile-1
*Beam Section, elset=SET-2, material=platinum_wire, temperature=GRADIENTS, section=CIRC
0.15
0.,0.,-1.
*End Part
**
*Part, name=ANEURYSM
*Node
*Include, input=nodeset_IA_1.inc
*Element, type=S3, elset=elset_IA
*Include, input=elset_IA_1.inc
*Nset, nset=RP_IA
 1
** Section: Section-2-SET-2
*Shell Section, elset=elset_IA, material=Aneurysm
0.3, 5
*End Part
**
*Part, name=CATHETER
*Node
      1,  0.300000012, -0.200000003,           0.
      2,  0.300000012,        -100.,           0.
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*Element, type=R3D3
    1,    1,   18,   19
    2,   18,  862,   19
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*Element, type=R3D4
14971,    3,  544, 7834,  545
14972,  544,  543, 7835, 7834
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*Nset, nset=CATHETER-REFPT_, internal
 14205, 14206
*End Part
**
**
** ASSEMBLY
**
*Assembly, name=Assembly
**
*Instance, name=CATHETER-1, part=CATHETER
*End Instance
**
*Instance, name=COMPLEX_200_8-1, part=COMPLEX_200_8
         -4.,           4.,           0.
*End Instance
**
*Instance, name=ANEURYSM-1, part=ANEURYSM
*End Instance
**
*Node
      2, -0.287847906,  -100.025909, -0.0845197663
*Elset, elset=B_SET-35, instance=CATHETER-1, generate
     1,  28073,      1
*Nset, nset=FIRST_coil, instance=COMPLEX_200_8-1
 1,
*Nset, nset=LAST_coil, instance=COMPLEX_200_8-1
 201,
*Nset, nset=M_SET-18
 2,
*Nset, nset=M_SET-29, instance=CATHETER-1
 14205,
*Nset, nset=M_SET-37, instance=CATHETER-1
 14206,
*Nset, nset=neck_points, instance=ANEURYSM-1
*Include, input=neck_set_1.inc
*Nset, nset=SET-24
 2,
*Nset, nset=SET-33, instance=CATHETER-1
 14205,
*Nset, nset=IA, instance=ANEURYSM-1
*Include, input=IA_1.inc
*Elset, elset=_COIL_END2, internal, instance=COMPLEX_200_8-1, generate
   1,  200,    1
*Elset, elset=_IA_SPOS, internal, instance=ANEURYSM-1
*Include, input=elset_IA_1.inc
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*Nset, nset=_PickedSet30, internal, instance=CATHETER-1
 14205,
*Elset, elset=_SURF-IA_SNEG_1, internal, instance=ANEURYSM-1
*Include, input=elset_IA_1.inc
*Elset, elset=_S_SURF-4_SNEG, internal, instance=CATHETER-1, generate
     1,  28073,      1
*Surface, type=ELEMENT, name=COIL
_COIL_END2, END2
*Surface, type=ELEMENT, name=IA
_IA_SPOS, SPOS
*Elset, elset=_SURF-IA_SNEG, internal, instance=ANEURYSM-1
*Include, input=elset_IA_1.inc
*Elset, elset=elset_IA,instance=ANEURYSM-1
*Include, input=elset_IA_1.inc
*Surface, type=ELEMENT, name=SURF-IA
_SURF-IA_SNEG, SNEG
*Surface, type=ELEMENT, name=S_SURF-4
_S_SURF-4_SNEG, SNEG
**
*Nset, nset=RP_IA, instance = ANEURYSM-1
 1
**
** Constraint: CONSTRAINT-IA
**Coupling, constraint name=CONSTRAINT-IA, ref node=RP_IA, surface=SURF-IA
**Kinematic
** Constraint: CONSTRAINT-3
*Coupling, constraint name=CONSTRAINT-3, ref node=M_SET-37, surface=S_SURF-4
*Kinematic
** Constraint: RigidBody-1
*Rigid Body, ref node=_PickedSet30, elset=B_SET-35
** Constraint: rigid_IA
*Rigid Body, ref node=RP_IA, elset=elset_IA
*End Assembly
*Amplitude, name=AMP-1, definition=SMOOTH STEP
             0.,              0.,             10.,              1.
*Amplitude, name=AMP-2, definition=SMOOTH STEP
             0.,              0.,             30.,              1.
**
** MATERIALS
**
*Material, name=platinum_wire
*Damping, alpha=100., beta=1e-06
*Density
 2.13e-07,
*Elastic
7500., 0.39
*Material, name=Aneurysm
*Damping, alpha=450.
*Density
 1.06e-09,
*Elastic
 3.2, 0.49
**
** INTERACTION PROPERTIES
**
*Surface Interaction, name=INTPROP-1
*Friction
0.,
*Surface Behavior, pressure-overclosure=HARD
*Surface Interaction, name=INTPROP-2
*Friction
 0.2,
*Surface Interaction, name=INTPROP-3
*Friction
 0.2,
**
** BOUNDARY CONDITIONS
**
** Name: Disp-BC-1 Type: Symmetry/Antisymmetry/Encastre
*Boundary
IA, ENCASTRE
** Name: Disp-BC-2 Type: Symmetry/Antisymmetry/Encastre
*Boundary
SET-33, ENCASTRE
**
** INTERACTIONS
**
** Interaction: general_contact
*Contact, op=NEW
*Contact Inclusions, ALL EXTERIOR
*Contact Property Assignment
 ,  , INTPROP-1
** ----------------------------------------------------------------
**
** STEP: Step-1
**
*Step, name=Step-1, nlgeom=YES
*Dynamic, Explicit
, 10.
*Bulk Viscosity
0.06, 1.2
** Mass Scaling: Semi-Automatic
**               Whole Model
*Fixed Mass Scaling, factor=1000.
**
** BOUNDARY CONDITIONS
**
** Name: Disp-BC-3 Type: Displacement/Rotation
*Boundary, amplitude=AMP-1
FIRST_coil, 1, 1
** Name: Disp-BC-4 Type: Displacement/Rotation
*Boundary, amplitude=AMP-1
FIRST_coil, 2, 2, -101.
** Name: Disp-BC-5 Type: Displacement/Rotation
*Boundary, amplitude=AMP-1
FIRST_coil, 3, 3
** Name: Disp-BC-6 Type: Displacement/Rotation
*Boundary, amplitude=AMP-1
FIRST_coil, 4, 4
** Name: Disp-BC-7 Type: Displacement/Rotation
*Boundary, amplitude=AMP-1
FIRST_coil, 5, 5
** Name: Disp-BC-8 Type: Displacement/Rotation
*Boundary, amplitude=AMP-1
FIRST_coil, 6, 6
*Boundary, amplitude=AMP-1
IA, ENCASTRE
**
** OUTPUT REQUESTS
**
*Restart, write, number interval=1, time marks=NO
**
** FIELD OUTPUT: F-Output-1
**
*Output, field, variable=PRESELECT, number interval=200
**
** HISTORY OUTPUT: H-Output-1
**
*Output, history, variable=PRESELECT
*End Step
** ----------------------------------------------------------------
**
** STEP: Step-2
**
*Step, name=Step-2, nlgeom=YES
*Dynamic, Explicit
, 35.
*Bulk Viscosity
0.06, 1.2
** Mass Scaling: Semi-Automatic
**               Whole Model
*Fixed Mass Scaling, factor=1000.
**
** BOUNDARY CONDITIONS
**
** Name: Disp-BC-1 Type: Symmetry/Antisymmetry/Encastre
*Boundary, op=NEW
** Name: Disp-BC-2 Type: Symmetry/Antisymmetry/Encastre
*Boundary, op=NEW
** Name: Disp-BC-3 Type: Displacement/Rotation
*Boundary, op=NEW
** Name: Disp-BC-4 Type: Displacement/Rotation
*Boundary, op=NEW
** Name: Disp-BC-5 Type: Displacement/Rotation
*Boundary, op=NEW
** Name: Disp-BC-6 Type: Displacement/Rotation
*Boundary, op=NEW
** Name: Disp-BC-7 Type: Displacement/Rotation
*Boundary, op=NEW
** Name: Disp-BC-8 Type: Displacement/Rotation
*Boundary, op=NEW
** Name: Disp-BC-11 Type: Displacement/Rotation
*Boundary, op=NEW, amplitude=AMP-2
LAST_coil, 2, 2, -100.
** Name: Disp-BC-12 Type: Symmetry/Antisymmetry/Encastre
*Boundary, op=NEW
SET-33, ENCASTRE
*Boundary, op=NEW,amplitude=AMP-1
IA, ENCASTRE
**
** INTERACTIONS
**
** Interaction: general_contact
*Contact, op=NEW
** Interaction: general_contact_Step-2
*Contact, op=NEW
*Contact Inclusions, ALL EXTERIOR
*Contact Property Assignment
 ,  , INTPROP-3
**
** OUTPUT REQUESTS
**
*Restart, write, number interval=1, time marks=NO
**
** FIELD OUTPUT: F-Output-2
**
*Output, field, variable=PRESELECT, number interval=200
**
** HISTORY OUTPUT: H-Output-2
*Energy Output, elset=_COIL_END2
ALLSE,
**
*Output, history, variable=PRESELECT
*End Step
